variable        NSTEPS          equal 1000
variable        THERMO_FREQ     equal 10
variable        DUMP_FREQ       equal 10
variable        TEMP            equal 300.0
#variable       PRES            equal 1.000
variable        TAU_T           equal 0.040
#variable       TAU_P           equal 1.000
variable	    SEED1           equal 20230121
variable	    SEED2           equal 20230121

echo			screen

units           metal
boundary        p p p
atom_style      atomic

read_data		/home/pengchao/glycine/geofile/54H2O_slab_1.data

neighbor        1.0 bin

mass            1 1.008
mass            2 15.999

pair_style      deepmd  /home/pengchao/glycine/dpmd/water/013_ks2dp_1e-6_only_water/frozen_model_compressed.pb
pair_coeff      * *

thermo_style    custom step temp density pe ke etotal vol press
thermo          ${THERMO_FREQ}

velocity        all create ${TEMP} ${SEED2} dist gaussian
fix             dpgen_plm all plumed plumedfile input.plumed outfile output.plumed
fix             1 all nve
fix             2 all temp/csvr ${TEMP} ${TEMP} ${TAU_T} ${SEED1}

fix             shiftcore  all  recenter  0.5  0.5  0.5 shift  all  units  fraction

dump            glycine1  all custom ${DUMP_FREQ}   glycine_10.lammpstrj    id type x y z
dump            glycine3  all custom 10000          glycine_1w.lammpstrj    id type x y z
dump_modify	    glycine1  sort id
dump_modify	    glycine3  sort id

restart			500000 restart.*.cont

timestep        0.001
run             ${NSTEPS}

write_restart	*.comp
write_data      *.data
